units metal
boundary p p p
dimension 3
atom_style charge
#processors * * 1
neighbor	2 bin
neigh_modify	every 10 delay 0 check no

read_data data.lmp

set type 1 charge  1.4
set	type 2 charge -1.4

comm_modify vel yes

#-------------------pair potential-------------------------------------
pair_style    born/coul/long 10 10.0
kspace_style pppm 1.0e-4
# Define variables for original parameters for clarity and reusability
variable P11 string "0.00450987 0.104 2.0266 0 0"
variable P12 string "0.00875955 0.202 2.8153 0 0"
variable P22 string "0.01301  0.3 3.604  30.2222169 0"

# --- Original types (and their interactions) ---
# These are still needed for atoms in the middle region
pair_coeff  1 1  ${P11}
pair_coeff  1 2  ${P12}
pair_coeff  2 2  ${P22}


fix     1 all box/relax x 0.0 y 0.0 z 0.0 vmax 0.001
min_style cg
minimize	1.0e-12	1.0e-12	10000 100000


write_data mini.dat
